// SBML level 2 version 3

function Constant_flux__irreversible(v)
  v;
end
Constant_flux__irreversible is "Constant flux (irreversible)";

model New_Model()

  // Compartments:
  compartment cell = 5;

  // Species:
  species H in cell = 10;
  species H2 in cell = 10;
  species O in cell = 10;
  species H2O in cell = 10;
  species Test in cell = 10;

  // Reactions:
  _reaction12800: 2 H => H2; cell*Constant_flux__irreversible(_reaction12800_v);
    _reaction12800_v = 1;
  _reaction12802: H2 + O => H2O; cell*Constant_flux__irreversible(_reaction12802_v);
    _reaction12802_v = 1;

  // Unit definitions:
  unit volume = 1e-6 litre;
  unit substance = 1e-9 mole;
end
